# Pràctica 03: Transformacions en l'espai (exercici A.5.8)
# Girar l'objecte 30° en sentit horari respecte l'eix vertical (y) des del vèrtex D.
# 1. Punts de l'objecte: cada columna és un punt (A, B, C, D, E, F).
P := [3, 7, 7, 3, 3, 3; 5, 5, 5, 5, 6, 6; 3, 3, 5, 5, 5, 3]
# Punt D (columna 3 de P): no es torna a escriure la dada, s'extreu de P.
D := submatrix(P, 0, 2, 3, 3)
# 2. Matrius 4×4. Sentit horari vist des de +y: angle negatiu.
α := -30 deg
# Pas 1: traslladar D a l'origen, T1 = T(−D).
T1 := [1, 0, 0, -D[0]; 0, 1, 0, -D[1]; 0, 0, 1, -D[2]; 0, 0, 0, 1]
# Pas 2: rotació d'angle α al voltant de l'eix y.
R := [cos(α), 0, sin(α), 0; 0, 1, 0, 0; -sin(α), 0, cos(α), 0; 0, 0, 0, 1]
# Pas 3: translació inversa de l'origen al punt D, T3 = T(D).
T3 := [1, 0, 0, D[0]; 0, 1, 0, D[1]; 0, 0, 1, D[2]; 0, 0, 0, 1]
# 3. Matriu resultant. Primer actua T1, després R i finalment T3: la primera queda a la dreta.
M := T3*R*T1
M = [0.866025, 0, -0.5, 2.90192; 0, 1.0, 0, 0; 0.5, 0, 0.866025, -0.830127; 0, 0, 0, 1.0]
# 4. Afegim una fila de 1 a la matriu de punts (coordenades homogènies).
U := [1, 1, 1, 1, 1, 1]
P4 := stack(P, U)
P4 = [
    3.0, 7.0, 7.0, 3.0, 3.0, 3.0;
    5.0, 5.0, 5.0, 5.0, 6.0, 6.0;
    3.0, 3.0, 5.0, 5.0, 5.0, 3.0;
    1.0, 1.0, 1.0, 1.0, 1.0, 1.0
]
# 5. Transformem els punts multiplicant-los per la matriu.
P1 := M*P4
P1 = [
    4.0, 7.4641, 6.4641, 3.0, 3.0, 4.0;
    5.0, 5.0, 5.0, 5.0, 6.0, 6.0;
    3.26795, 5.26795, 7.0, 5.0, 5.0, 3.26795;
    1.0, 1.0, 1.0, 1.0, 1.0, 1.0
]
# 6. Extraiem per separat les coordenades X, Y i Z (vectors columna).
row(Mx, i) := submatrix(Mx, i, i, 0, cols(Mx) - 1)
X := transpose(row(P, 0))
Y := transpose(row(P, 1))
Z := transpose(row(P, 2))
X1 := transpose(row(P1, 0))
Y1 := transpose(row(P1, 1))
Z1 := transpose(row(P1, 2))
# 7. Comprovacions: el determinant de la rotació és 1 i el punt D queda fix.
det(R) = 1.0
submatrix(P1, 0, 2, 3, 3) = [3.0; 5.0; 5.0]
# 8. Per dibuixar totes les arestes: ordre A-B-C-D-A-F-E-D-C-E-F-B. La matriu S (6×12) reordena les columnes.
S := [
    1, 0, 0, 0, 1, 0, 0, 0, 0, 0, 0, 0;
    0, 1, 0, 0, 0, 0, 0, 0, 0, 0, 0, 1;
    0, 0, 1, 0, 0, 0, 0, 0, 1, 0, 0, 0;
    0, 0, 0, 1, 0, 0, 0, 1, 0, 0, 0, 0;
    0, 0, 0, 0, 0, 0, 1, 0, 0, 1, 0, 0;
    0, 0, 0, 0, 0, 1, 0, 0, 0, 0, 1, 0
]
Dib0 := transpose(submatrix(P4*S, 0, 2, 0, 11))
Dib1 := transpose(submatrix(P1*S, 0, 2, 0, 11))
# Gràfica: Ctrl+3 (Plots / Insert Plot / 3D Plot), escriu Dib0 i afegeix la traça Dib1 (Plots / Traces / Add Trace). Activa les línies de la traça.
